*Heading
** Job name: exp2 Model name: Model-1
** Generated by: Abaqus/CAE 2021
*Preprint, echo=NO, model=NO, history=NO, contact=NO
**
** PARTS
**
*Part, name=Face2D
*Node
      1,   172.295731,   -158.11171
      2,   172.295731,  -156.161713
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*Element, type=CPS3
  1,  6386,  5932,  6256
  2, 11580,  6101,  5794
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*Element, type=CPS4
  390,  2521,  2768,  2756,     8
  391,  5134,  5014,   279,  4903
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*Nset, nset=Set-2, generate
     1,  12956,      1
*Elset, elset=Set-2, generate
     1,  12920,      1
** Section: Section-1
*Solid Section, elset=Set-2, material=Material-1
1.,
*End Part
**
**
** ASSEMBLY
**
*Assembly, name=Assembly
**
*Instance, name=Face2D-1, part=Face2D
*End Instance
**
*Nset, nset=Set-4, instance=Face2D-1
    8,  170,  171,  172,  173,  174
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*Elset, elset=Set-4, instance=Face2D-1
  390,  492,  567, 1154, 1155, 1157
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*Nset, nset=Set-5, instance=Face2D-1
 170,
*Nset, nset=Set-6, instance=Face2D-1
   64,   65,   66,   67,   68,   69
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*Elset, elset=Set-6, instance=Face2D-1
  437,  438,  439,  441,  638,  640
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*End Assembly
**
** MATERIALS
**
*Material, name=Material-1
*Elastic
210000., 0.3
*Plastic
400.,  0.
600., 0.1
800.,  1.
** ----------------------------------------------------------------
**
** STEP: Load
**
*Step, name=Load, nlgeom=NO, inc=10000
*Static
0.1, 1., 1e-05, 0.1
**
** BOUNDARY CONDITIONS
**
** Name: BC-1 Type: Displacement/Rotation
*Boundary
Set-4, 2, 2
** Name: BC-2 Type: Displacement/Rotation
*Boundary
Set-5, 1, 1
** Name: BC-3 Type: Displacement/Rotation
*Boundary
Set-6, 2, 2, 5.
**
** OUTPUT REQUESTS
**
*Restart, write, frequency=0
**
** FIELD OUTPUT: F-Output-1
**
*Output, field, variable=PRESELECT
**
** HISTORY OUTPUT: H-Output-1
**
*Output, history, variable=PRESELECT
*End Step
