*Heading
** Job name: u-500 Model name: Model-1
** Generated by: Abaqus/CAE 2021
*Preprint, echo=NO, model=NO, history=NO, contact=NO
**
** PARTS
**
*Part, name=Face2D
*Node
      1,   165.819244,  -71.9120636
      2,   158.733749,  -53.8151093
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*Element, type=CPS4
    1,    22,    23,  1451,  1185
    2,    23,    24,  1452,  1451
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*Nset, nset=Set-2, generate
     1,  40089,      1
*Elset, elset=Set-2, generate
     1,  39629,      1
*Elset, elset=grain-1
2246, 23813, 33893, 32803, 32318, 33892
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*Elset, elset=grain-10
22203, 22204, 2606, 15665, 21772, 3136
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*Elset, elset=grain-11
23990, 24167, 17768, 35257, 28417, 24344
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*Elset, elset=grain-12
2431, 2254, 2255, 2430, 25614, 2253
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*Elset, elset=grain-13
30649, 19375, 32280, 32281, 32283, 32282
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*Elset, elset=grain-14
31750, 31789, 31749, 2317, 6728, 23778
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*Elset, elset=grain-15
3846, 4024, 6271, 6332, 6516, 6548
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*Elset, elset=grain-16
22205, 22381, 22028, 22382, 23118, 35192
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*Elset, elset=grain-17
5368, 31258, 31259, 25983, 26160, 3045
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*Elset, elset=grain-18
31260, 31313, 22942, 20857, 21034, 12827
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*Elset, elset=grain-19
2428, 2429, 1109, 1113, 2427, 1112
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*Elset, elset=grain-2
31275, 31314, 1788, 1612, 1613, 1614
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*Elset, elset=grain-20
33733, 33735, 31470, 31471, 31472, 31509
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*Elset, elset=grain-3
9381, 9382, 11742, 1890, 22056, 9134
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*Elset, elset=grain-4
27328, 4093, 4094, 26976, 18470, 19185
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*Elset, elset=grain-5
1691, 18976, 35143, 1064, 1847, 24351
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*Elset, elset=grain-6
39504, 29444, 31174, 32907, 1436, 1594
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*Elset, elset=grain-7
16848, 6129, 7507, 7584, 6717, 7741
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*Elset, elset=grain-8
10118, 35338, 1579, 29441, 29796, 18060
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*Elset, elset=grain-9
1, 2, 55, 56, 57, 67
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** Section: crystal-1
*Solid Section, elset=grain-1, material=metal-1
** Section: crystal-10
*Solid Section, elset=grain-10, material=metal-10
** Section: crystal-11
*Solid Section, elset=grain-11, material=metal-11
** Section: crystal-12
*Solid Section, elset=grain-12, material=metal-12
** Section: crystal-13
*Solid Section, elset=grain-13, material=metal-13
** Section: crystal-14
*Solid Section, elset=grain-14, material=metal-14
** Section: crystal-15
*Solid Section, elset=grain-15, material=metal-15
** Section: crystal-16
*Solid Section, elset=grain-16, material=metal-16
** Section: crystal-17
*Solid Section, elset=grain-17, material=metal-17
** Section: crystal-18
*Solid Section, elset=grain-18, material=metal-18
** Section: crystal-19
*Solid Section, elset=grain-19, material=metal-19
** Section: crystal-2
*Solid Section, elset=grain-2, material=metal-2
** Section: crystal-20
*Solid Section, elset=grain-20, material=metal-20
** Section: crystal-3
*Solid Section, elset=grain-3, material=metal-3
** Section: crystal-4
*Solid Section, elset=grain-4, material=metal-4
** Section: crystal-5
*Solid Section, elset=grain-5, material=metal-5
** Section: crystal-6
*Solid Section, elset=grain-6, material=metal-6
** Section: crystal-7
*Solid Section, elset=grain-7, material=metal-7
** Section: crystal-8
*Solid Section, elset=grain-8, material=metal-8
** Section: crystal-9
*Solid Section, elset=grain-9, material=metal-9
*End Part
**
**
** ASSEMBLY
**
*Assembly, name=Assembly
**
*Instance, name=Face2D-1, part=Face2D
*End Instance
**
*Nset, nset=Set-4, instance=Face2D-1
   11,   12,   14,  856,  857,  858
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*Elset, elset=Set-4, instance=Face2D-1
 31285, 31324, 31363, 31402, 31441, 31480
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*Nset, nset=Set-5, instance=Face2D-1
 11,
*Nset, nset=Set-6, instance=Face2D-1
   2,   3,   8,  71,  72,  73
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*Elset, elset=Set-6, instance=Face2D-1
    77,   109,   141,   173,   205,   237
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*Nset, nset=_PickedSet12, internal, instance=Face2D-1, generate
     1,  40089,      1
*Elset, elset=_PickedSet12, internal, instance=Face2D-1, generate
     1,  39629,      1
*Enrichment, name=Crack-1, type=PROPAGATION CRACK, elset=_PickedSet12, interaction=IntProp-1
*End Assembly
*Material, name=metal-9
*Damage Initiation, criterion=USER, FAILURE MECHANISMS=1, PROPERTIES=1
 0.02,
*Damage Evolution, type=DISPLACEMENT, FAILURE INDEX=1
 0.02,
*Damage Stabilization
1e-06
*Depvar
128,
*User Material, constants=160, unsymm
230.714e3,  144.240e3,  119.228e3,  0.0, 0.0, 0.0, 0.0, 0.0
0.0, 0.0, 0.0, 0.0, 0.0, 0.0, 0.0, 0.0
0.0, 0.0, 0.0, 0.0, 0.0, 0.0, 0.0, 0.0
1.0, 0.0, 0.0, 0.0, 0.0, 0.0, 0.0, 0.0
1.0, 1.0, 1.0, 1.0, 1.0, 0.0, 0.0, 0.0
0.0, 0.0, 0.0, 0.0, 0.0, 0.0, 0.0, 0.0
0.0, 0.0, 0.0, 0.0, 0.0, 0.0, 0.0, 0.0
1.0, 0.0, 0.0,  -0.826828,  0.419594,  -0.374562, 0.0, 0.0
0.0, 1.0, 0.0,  -0.026227,  -0.693979,  -0.719518, 0.0, 0.0
20.000000,  0.001000, 0.0, 0.0, 0.0, 0.0, 0.0, 0.0
0.0, 0.0, 0.0, 0.0, 0.0, 0.0, 0.0, 0.0
0.0, 0.0, 0.0, 0.0, 0.0, 0.0, 0.0, 0.0
150.000000,  360.000000,  260.000000, 0.0, 0.0, 0.0, 0.0, 0.0
1.0, 1.0, 0.0, 0.0, 0.0, 0.0, 0.0, 0.0
0.0, 0.0, 0.0, 0.0, 0.0, 0.0, 0.0, 0.0
0.0, 0.0, 0.0, 0.0, 0.0, 0.0, 0.0, 0.0
0.0, 0.0, 0.0, 0.0, 0.0, 0.0, 0.0, 0.0
0.0, 0.0, 0.0, 0.0, 0.0, 0.0, 0.0, 0.0
0.500000,  0.000000, 0.0, 0.0, 0.0, 0.0, 0.0, 0.0
0.000000,  10.000000,  0.000010, 0.0, 0.0, 0.0, 0.0, 0.0
*Material, name=metal-14
*Damage Initiation, criterion=USER, FAILURE MECHANISMS=1, PROPERTIES=1
 0.02,
*Damage Evolution, type=DISPLACEMENT, FAILURE INDEX=1
 0.02,
*Damage Stabilization
1e-06
*Depvar
128,
*User Material, constants=160, unsymm
230.714e3,  144.240e3,  119.228e3,  0.0, 0.0, 0.0, 0.0, 0.0
0.0, 0.0, 0.0, 0.0, 0.0, 0.0, 0.0, 0.0
0.0, 0.0, 0.0, 0.0, 0.0, 0.0, 0.0, 0.0
1.0, 0.0, 0.0, 0.0, 0.0, 0.0, 0.0, 0.0
1.0, 1.0, 1.0, 1.0, 1.0, 0.0, 0.0, 0.0
0.0, 0.0, 0.0, 0.0, 0.0, 0.0, 0.0, 0.0
0.0, 0.0, 0.0, 0.0, 0.0, 0.0, 0.0, 0.0
1.0, 0.0, 0.0,  0.113411,  0.743912,  -0.658584, 0.0, 0.0
0.0, 1.0, 0.0,  0.990326,  -0.137978,  0.014684, 0.0, 0.0
20.000000,  0.001000, 0.0, 0.0, 0.0, 0.0, 0.0, 0.0
0.0, 0.0, 0.0, 0.0, 0.0, 0.0, 0.0, 0.0
0.0, 0.0, 0.0, 0.0, 0.0, 0.0, 0.0, 0.0
150.000000,  360.000000,  260.000000, 0.0, 0.0, 0.0, 0.0, 0.0
1.0, 1.0, 0.0, 0.0, 0.0, 0.0, 0.0, 0.0
0.0, 0.0, 0.0, 0.0, 0.0, 0.0, 0.0, 0.0
0.0, 0.0, 0.0, 0.0, 0.0, 0.0, 0.0, 0.0
0.0, 0.0, 0.0, 0.0, 0.0, 0.0, 0.0, 0.0
0.0, 0.0, 0.0, 0.0, 0.0, 0.0, 0.0, 0.0
0.500000,  0.000000, 0.0, 0.0, 0.0, 0.0, 0.0, 0.0
0.000000,  10.000000,  0.000010, 0.0, 0.0, 0.0, 0.0, 0.0
*Material, name=metal-4
*Damage Initiation, criterion=USER, FAILURE MECHANISMS=1, PROPERTIES=1
 0.02,
*Damage Evolution, type=DISPLACEMENT, FAILURE INDEX=1
 0.02,
*Damage Stabilization
1e-06
*Depvar
128,
*User Material, constants=160, unsymm
230.714e3,  144.240e3,  119.228e3,  0.0, 0.0, 0.0, 0.0, 0.0
0.0, 0.0, 0.0, 0.0, 0.0, 0.0, 0.0, 0.0
0.0, 0.0, 0.0, 0.0, 0.0, 0.0, 0.0, 0.0
1.0, 0.0, 0.0, 0.0, 0.0, 0.0, 0.0, 0.0
1.0, 1.0, 1.0, 1.0, 1.0, 0.0, 0.0, 0.0
0.0, 0.0, 0.0, 0.0, 0.0, 0.0, 0.0, 0.0
0.0, 0.0, 0.0, 0.0, 0.0, 0.0, 0.0, 0.0
1.0, 0.0, 0.0,  0.516739,  -0.162065,  0.840664, 0.0, 0.0
0.0, 1.0, 0.0,  -0.510724,  0.729721,  0.454609, 0.0, 0.0
20.000000,  0.001000, 0.0, 0.0, 0.0, 0.0, 0.0, 0.0
0.0, 0.0, 0.0, 0.0, 0.0, 0.0, 0.0, 0.0
0.0, 0.0, 0.0, 0.0, 0.0, 0.0, 0.0, 0.0
150.000000,  360.000000,  260.000000, 0.0, 0.0, 0.0, 0.0, 0.0
1.0, 1.0, 0.0, 0.0, 0.0, 0.0, 0.0, 0.0
0.0, 0.0, 0.0, 0.0, 0.0, 0.0, 0.0, 0.0
0.0, 0.0, 0.0, 0.0, 0.0, 0.0, 0.0, 0.0
0.0, 0.0, 0.0, 0.0, 0.0, 0.0, 0.0, 0.0
0.0, 0.0, 0.0, 0.0, 0.0, 0.0, 0.0, 0.0
0.500000,  0.000000, 0.0, 0.0, 0.0, 0.0, 0.0, 0.0
0.000000,  10.000000,  0.000010, 0.0, 0.0, 0.0, 0.0, 0.0
*Material, name=metal-2
*Damage Initiation, criterion=USER, FAILURE MECHANISMS=1, PROPERTIES=1
 0.02,
*Damage Evolution, type=DISPLACEMENT, FAILURE INDEX=1
 0.02,
*Damage Stabilization
1e-06
*Depvar
128,
*User Material, constants=160, unsymm
230.714e3,  144.240e3,  119.228e3,  0.0, 0.0, 0.0, 0.0, 0.0
0.0, 0.0, 0.0, 0.0, 0.0, 0.0, 0.0, 0.0
0.0, 0.0, 0.0, 0.0, 0.0, 0.0, 0.0, 0.0
1.0, 0.0, 0.0, 0.0, 0.0, 0.0, 0.0, 0.0
1.0, 1.0, 1.0, 1.0, 1.0, 0.0, 0.0, 0.0
0.0, 0.0, 0.0, 0.0, 0.0, 0.0, 0.0, 0.0
0.0, 0.0, 0.0, 0.0, 0.0, 0.0, 0.0, 0.0
1.0, 0.0, 0.0,  -0.535649,  -0.312569,  -0.784462, 0.0, 0.0
0.0, 1.0, 0.0,  -0.820270,  -0.028076,  0.571287, 0.0, 0.0
20.000000,  0.001000, 0.0, 0.0, 0.0, 0.0, 0.0, 0.0
0.0, 0.0, 0.0, 0.0, 0.0, 0.0, 0.0, 0.0
0.0, 0.0, 0.0, 0.0, 0.0, 0.0, 0.0, 0.0
150.000000,  360.000000,  260.000000, 0.0, 0.0, 0.0, 0.0, 0.0
1.0, 1.0, 0.0, 0.0, 0.0, 0.0, 0.0, 0.0
0.0, 0.0, 0.0, 0.0, 0.0, 0.0, 0.0, 0.0
0.0, 0.0, 0.0, 0.0, 0.0, 0.0, 0.0, 0.0
0.0, 0.0, 0.0, 0.0, 0.0, 0.0, 0.0, 0.0
0.0, 0.0, 0.0, 0.0, 0.0, 0.0, 0.0, 0.0
0.500000,  0.000000, 0.0, 0.0, 0.0, 0.0, 0.0, 0.0
0.000000,  10.000000,  0.000010, 0.0, 0.0, 0.0, 0.0, 0.0
*Material, name=metal-8
*Damage Initiation, criterion=USER, FAILURE MECHANISMS=1, PROPERTIES=1
 0.02,
*Damage Evolution, type=DISPLACEMENT, FAILURE INDEX=1
 0.02,
*Damage Stabilization
1e-06
*Depvar
128,
*User Material, constants=160, unsymm
230.714e3,  144.240e3,  119.228e3,  0.0, 0.0, 0.0, 0.0, 0.0
0.0, 0.0, 0.0, 0.0, 0.0, 0.0, 0.0, 0.0
0.0, 0.0, 0.0, 0.0, 0.0, 0.0, 0.0, 0.0
1.0, 0.0, 0.0, 0.0, 0.0, 0.0, 0.0, 0.0
1.0, 1.0, 1.0, 1.0, 1.0, 0.0, 0.0, 0.0
0.0, 0.0, 0.0, 0.0, 0.0, 0.0, 0.0, 0.0
0.0, 0.0, 0.0, 0.0, 0.0, 0.0, 0.0, 0.0
1.0, 0.0, 0.0,  -0.217334,  -0.832649,  0.509373, 0.0, 0.0
0.0, 1.0, 0.0,  -0.920292,  0.000874,  -0.391232, 0.0, 0.0
20.000000,  0.001000, 0.0, 0.0, 0.0, 0.0, 0.0, 0.0
0.0, 0.0, 0.0, 0.0, 0.0, 0.0, 0.0, 0.0
0.0, 0.0, 0.0, 0.0, 0.0, 0.0, 0.0, 0.0
150.000000,  360.000000,  260.000000, 0.0, 0.0, 0.0, 0.0, 0.0
1.0, 1.0, 0.0, 0.0, 0.0, 0.0, 0.0, 0.0
0.0, 0.0, 0.0, 0.0, 0.0, 0.0, 0.0, 0.0
0.0, 0.0, 0.0, 0.0, 0.0, 0.0, 0.0, 0.0
0.0, 0.0, 0.0, 0.0, 0.0, 0.0, 0.0, 0.0
0.0, 0.0, 0.0, 0.0, 0.0, 0.0, 0.0, 0.0
0.500000,  0.000000, 0.0, 0.0, 0.0, 0.0, 0.0, 0.0
0.000000,  10.000000,  0.000010, 0.0, 0.0, 0.0, 0.0, 0.0
*Material, name=metal-19
*Damage Initiation, criterion=USER, FAILURE MECHANISMS=1, PROPERTIES=1
 0.02,
*Damage Evolution, type=DISPLACEMENT, FAILURE INDEX=1
 0.02,
*Damage Stabilization
1e-06
*Depvar
128,
*User Material, constants=160, unsymm
230.714e3,  144.240e3,  119.228e3,  0.0, 0.0, 0.0, 0.0, 0.0
0.0, 0.0, 0.0, 0.0, 0.0, 0.0, 0.0, 0.0
0.0, 0.0, 0.0, 0.0, 0.0, 0.0, 0.0, 0.0
1.0, 0.0, 0.0, 0.0, 0.0, 0.0, 0.0, 0.0
1.0, 1.0, 1.0, 1.0, 1.0, 0.0, 0.0, 0.0
0.0, 0.0, 0.0, 0.0, 0.0, 0.0, 0.0, 0.0
0.0, 0.0, 0.0, 0.0, 0.0, 0.0, 0.0, 0.0
1.0, 0.0, 0.0,  -0.597848,  -0.763960,  -0.242781, 0.0, 0.0
0.0, 1.0, 0.0,  -0.310049,  -0.058918,  0.948893, 0.0, 0.0
20.000000,  0.001000, 0.0, 0.0, 0.0, 0.0, 0.0, 0.0
0.0, 0.0, 0.0, 0.0, 0.0, 0.0, 0.0, 0.0
0.0, 0.0, 0.0, 0.0, 0.0, 0.0, 0.0, 0.0
150.000000,  360.000000,  260.000000, 0.0, 0.0, 0.0, 0.0, 0.0
1.0, 1.0, 0.0, 0.0, 0.0, 0.0, 0.0, 0.0
0.0, 0.0, 0.0, 0.0, 0.0, 0.0, 0.0, 0.0
0.0, 0.0, 0.0, 0.0, 0.0, 0.0, 0.0, 0.0
0.0, 0.0, 0.0, 0.0, 0.0, 0.0, 0.0, 0.0
0.0, 0.0, 0.0, 0.0, 0.0, 0.0, 0.0, 0.0
0.500000,  0.000000, 0.0, 0.0, 0.0, 0.0, 0.0, 0.0
0.000000,  10.000000,  0.000010, 0.0, 0.0, 0.0, 0.0, 0.0
*Material, name=metal-3
*Damage Initiation, criterion=USER, FAILURE MECHANISMS=1, PROPERTIES=1
 0.02,
*Damage Evolution, type=DISPLACEMENT, FAILURE INDEX=1
 0.02,
*Damage Stabilization
1e-06
*Depvar
128,
*User Material, constants=160, unsymm
230.714e3,  144.240e3,  119.228e3,  0.0, 0.0, 0.0, 0.0, 0.0
0.0, 0.0, 0.0, 0.0, 0.0, 0.0, 0.0, 0.0
0.0, 0.0, 0.0, 0.0, 0.0, 0.0, 0.0, 0.0
1.0, 0.0, 0.0, 0.0, 0.0, 0.0, 0.0, 0.0
1.0, 1.0, 1.0, 1.0, 1.0, 0.0, 0.0, 0.0
0.0, 0.0, 0.0, 0.0, 0.0, 0.0, 0.0, 0.0
0.0, 0.0, 0.0, 0.0, 0.0, 0.0, 0.0, 0.0
1.0, 0.0, 0.0,  -0.873720,  -0.265843,  -0.407358, 0.0, 0.0
0.0, 1.0, 0.0,  -0.175310,  -0.609075,  0.773495, 0.0, 0.0
20.000000,  0.001000, 0.0, 0.0, 0.0, 0.0, 0.0, 0.0
0.0, 0.0, 0.0, 0.0, 0.0, 0.0, 0.0, 0.0
0.0, 0.0, 0.0, 0.0, 0.0, 0.0, 0.0, 0.0
150.000000,  360.000000,  260.000000, 0.0, 0.0, 0.0, 0.0, 0.0
1.0, 1.0, 0.0, 0.0, 0.0, 0.0, 0.0, 0.0
0.0, 0.0, 0.0, 0.0, 0.0, 0.0, 0.0, 0.0
0.0, 0.0, 0.0, 0.0, 0.0, 0.0, 0.0, 0.0
0.0, 0.0, 0.0, 0.0, 0.0, 0.0, 0.0, 0.0
0.0, 0.0, 0.0, 0.0, 0.0, 0.0, 0.0, 0.0
0.500000,  0.000000, 0.0, 0.0, 0.0, 0.0, 0.0, 0.0
0.000000,  10.000000,  0.000010, 0.0, 0.0, 0.0, 0.0, 0.0
*Material, name=metal-16
*Damage Initiation, criterion=USER, FAILURE MECHANISMS=1, PROPERTIES=1
 0.02,
*Damage Evolution, type=DISPLACEMENT, FAILURE INDEX=1
 0.02,
*Damage Stabilization
1e-06
*Depvar
128,
*User Material, constants=160, unsymm
230.714e3,  144.240e3,  119.228e3,  0.0, 0.0, 0.0, 0.0, 0.0
0.0, 0.0, 0.0, 0.0, 0.0, 0.0, 0.0, 0.0
0.0, 0.0, 0.0, 0.0, 0.0, 0.0, 0.0, 0.0
1.0, 0.0, 0.0, 0.0, 0.0, 0.0, 0.0, 0.0
1.0, 1.0, 1.0, 1.0, 1.0, 0.0, 0.0, 0.0
0.0, 0.0, 0.0, 0.0, 0.0, 0.0, 0.0, 0.0
0.0, 0.0, 0.0, 0.0, 0.0, 0.0, 0.0, 0.0
1.0, 0.0, 0.0,  -0.070661,  0.413721,  -0.907657, 0.0, 0.0
0.0, 1.0, 0.0,  0.744114,  -0.584124,  -0.324180, 0.0, 0.0
20.000000,  0.001000, 0.0, 0.0, 0.0, 0.0, 0.0, 0.0
0.0, 0.0, 0.0, 0.0, 0.0, 0.0, 0.0, 0.0
0.0, 0.0, 0.0, 0.0, 0.0, 0.0, 0.0, 0.0
150.000000,  360.000000,  260.000000, 0.0, 0.0, 0.0, 0.0, 0.0
1.0, 1.0, 0.0, 0.0, 0.0, 0.0, 0.0, 0.0
0.0, 0.0, 0.0, 0.0, 0.0, 0.0, 0.0, 0.0
0.0, 0.0, 0.0, 0.0, 0.0, 0.0, 0.0, 0.0
0.0, 0.0, 0.0, 0.0, 0.0, 0.0, 0.0, 0.0
0.0, 0.0, 0.0, 0.0, 0.0, 0.0, 0.0, 0.0
0.500000,  0.000000, 0.0, 0.0, 0.0, 0.0, 0.0, 0.0
0.000000,  10.000000,  0.000010, 0.0, 0.0, 0.0, 0.0, 0.0
*Material, name=metal-6
*Damage Initiation, criterion=USER, FAILURE MECHANISMS=1, PROPERTIES=1
 0.02,
*Damage Evolution, type=DISPLACEMENT, FAILURE INDEX=1
 0.02,
*Damage Stabilization
1e-06
*Depvar
128,
*User Material, constants=160, unsymm
230.714e3,  144.240e3,  119.228e3,  0.0, 0.0, 0.0, 0.0, 0.0
0.0, 0.0, 0.0, 0.0, 0.0, 0.0, 0.0, 0.0
0.0, 0.0, 0.0, 0.0, 0.0, 0.0, 0.0, 0.0
1.0, 0.0, 0.0, 0.0, 0.0, 0.0, 0.0, 0.0
1.0, 1.0, 1.0, 1.0, 1.0, 0.0, 0.0, 0.0
0.0, 0.0, 0.0, 0.0, 0.0, 0.0, 0.0, 0.0
0.0, 0.0, 0.0, 0.0, 0.0, 0.0, 0.0, 0.0
1.0, 0.0, 0.0,  -0.269431,  0.892212,  -0.362443, 0.0, 0.0
0.0, 1.0, 0.0,  0.235300,  0.425945,  0.873616, 0.0, 0.0
20.000000,  0.001000, 0.0, 0.0, 0.0, 0.0, 0.0, 0.0
0.0, 0.0, 0.0, 0.0, 0.0, 0.0, 0.0, 0.0
0.0, 0.0, 0.0, 0.0, 0.0, 0.0, 0.0, 0.0
150.000000,  360.000000,  260.000000, 0.0, 0.0, 0.0, 0.0, 0.0
1.0, 1.0, 0.0, 0.0, 0.0, 0.0, 0.0, 0.0
0.0, 0.0, 0.0, 0.0, 0.0, 0.0, 0.0, 0.0
0.0, 0.0, 0.0, 0.0, 0.0, 0.0, 0.0, 0.0
0.0, 0.0, 0.0, 0.0, 0.0, 0.0, 0.0, 0.0
0.0, 0.0, 0.0, 0.0, 0.0, 0.0, 0.0, 0.0
0.500000,  0.000000, 0.0, 0.0, 0.0, 0.0, 0.0, 0.0
0.000000,  10.000000,  0.000010, 0.0, 0.0, 0.0, 0.0, 0.0
*Material, name=metal-11
*Damage Initiation, criterion=USER, FAILURE MECHANISMS=1, PROPERTIES=1
 0.02,
*Damage Evolution, type=DISPLACEMENT, FAILURE INDEX=1
 0.02,
*Damage Stabilization
1e-06
*Depvar
128,
*User Material, constants=160, unsymm
230.714e3,  144.240e3,  119.228e3,  0.0, 0.0, 0.0, 0.0, 0.0
0.0, 0.0, 0.0, 0.0, 0.0, 0.0, 0.0, 0.0
0.0, 0.0, 0.0, 0.0, 0.0, 0.0, 0.0, 0.0
1.0, 0.0, 0.0, 0.0, 0.0, 0.0, 0.0, 0.0
1.0, 1.0, 1.0, 1.0, 1.0, 0.0, 0.0, 0.0
0.0, 0.0, 0.0, 0.0, 0.0, 0.0, 0.0, 0.0
0.0, 0.0, 0.0, 0.0, 0.0, 0.0, 0.0, 0.0
1.0, 0.0, 0.0,  0.784055,  -0.449219,  -0.428322, 0.0, 0.0
0.0, 1.0, 0.0,  -0.608946,  -0.423105,  -0.670945, 0.0, 0.0
20.000000,  0.001000, 0.0, 0.0, 0.0, 0.0, 0.0, 0.0
0.0, 0.0, 0.0, 0.0, 0.0, 0.0, 0.0, 0.0
0.0, 0.0, 0.0, 0.0, 0.0, 0.0, 0.0, 0.0
150.000000,  360.000000,  260.000000, 0.0, 0.0, 0.0, 0.0, 0.0
1.0, 1.0, 0.0, 0.0, 0.0, 0.0, 0.0, 0.0
0.0, 0.0, 0.0, 0.0, 0.0, 0.0, 0.0, 0.0
0.0, 0.0, 0.0, 0.0, 0.0, 0.0, 0.0, 0.0
0.0, 0.0, 0.0, 0.0, 0.0, 0.0, 0.0, 0.0
0.0, 0.0, 0.0, 0.0, 0.0, 0.0, 0.0, 0.0
0.500000,  0.000000, 0.0, 0.0, 0.0, 0.0, 0.0, 0.0
0.000000,  10.000000,  0.000010, 0.0, 0.0, 0.0, 0.0, 0.0
*Material, name=metal-5
*Damage Initiation, criterion=USER, FAILURE MECHANISMS=1, PROPERTIES=1
 0.02,
*Damage Evolution, type=DISPLACEMENT, FAILURE INDEX=1
 0.02,
*Damage Stabilization
1e-06
*Depvar
128,
*User Material, constants=160, unsymm
230.714e3,  144.240e3,  119.228e3,  0.0, 0.0, 0.0, 0.0, 0.0
0.0, 0.0, 0.0, 0.0, 0.0, 0.0, 0.0, 0.0
0.0, 0.0, 0.0, 0.0, 0.0, 0.0, 0.0, 0.0
1.0, 0.0, 0.0, 0.0, 0.0, 0.0, 0.0, 0.0
1.0, 1.0, 1.0, 1.0, 1.0, 0.0, 0.0, 0.0
0.0, 0.0, 0.0, 0.0, 0.0, 0.0, 0.0, 0.0
0.0, 0.0, 0.0, 0.0, 0.0, 0.0, 0.0, 0.0
1.0, 0.0, 0.0,  -0.829215,  0.030368,  0.558103, 0.0, 0.0
0.0, 1.0, 0.0,  0.410846,  0.710118,  0.571785, 0.0, 0.0
20.000000,  0.001000, 0.0, 0.0, 0.0, 0.0, 0.0, 0.0
0.0, 0.0, 0.0, 0.0, 0.0, 0.0, 0.0, 0.0
0.0, 0.0, 0.0, 0.0, 0.0, 0.0, 0.0, 0.0
150.000000,  360.000000,  260.000000, 0.0, 0.0, 0.0, 0.0, 0.0
1.0, 1.0, 0.0, 0.0, 0.0, 0.0, 0.0, 0.0
0.0, 0.0, 0.0, 0.0, 0.0, 0.0, 0.0, 0.0
0.0, 0.0, 0.0, 0.0, 0.0, 0.0, 0.0, 0.0
0.0, 0.0, 0.0, 0.0, 0.0, 0.0, 0.0, 0.0
0.0, 0.0, 0.0, 0.0, 0.0, 0.0, 0.0, 0.0
0.500000,  0.000000, 0.0, 0.0, 0.0, 0.0, 0.0, 0.0
0.000000,  10.000000,  0.000010, 0.0, 0.0, 0.0, 0.0, 0.0
*Material, name=metal-12
*Damage Initiation, criterion=USER, FAILURE MECHANISMS=1, PROPERTIES=1
 0.02,
*Damage Evolution, type=DISPLACEMENT, FAILURE INDEX=1
 0.02,
*Damage Stabilization
1e-06
*Depvar
128,
*User Material, constants=160, unsymm
230.714e3,  144.240e3,  119.228e3,  0.0, 0.0, 0.0, 0.0, 0.0
0.0, 0.0, 0.0, 0.0, 0.0, 0.0, 0.0, 0.0
0.0, 0.0, 0.0, 0.0, 0.0, 0.0, 0.0, 0.0
1.0, 0.0, 0.0, 0.0, 0.0, 0.0, 0.0, 0.0
1.0, 1.0, 1.0, 1.0, 1.0, 0.0, 0.0, 0.0
0.0, 0.0, 0.0, 0.0, 0.0, 0.0, 0.0, 0.0
0.0, 0.0, 0.0, 0.0, 0.0, 0.0, 0.0, 0.0
1.0, 0.0, 0.0,  -0.199254,  0.493251,  0.846759, 0.0, 0.0
0.0, 1.0, 0.0,  -0.606457,  -0.740805,  0.288823, 0.0, 0.0
20.000000,  0.001000, 0.0, 0.0, 0.0, 0.0, 0.0, 0.0
0.0, 0.0, 0.0, 0.0, 0.0, 0.0, 0.0, 0.0
0.0, 0.0, 0.0, 0.0, 0.0, 0.0, 0.0, 0.0
150.000000,  360.000000,  260.000000, 0.0, 0.0, 0.0, 0.0, 0.0
1.0, 1.0, 0.0, 0.0, 0.0, 0.0, 0.0, 0.0
0.0, 0.0, 0.0, 0.0, 0.0, 0.0, 0.0, 0.0
0.0, 0.0, 0.0, 0.0, 0.0, 0.0, 0.0, 0.0
0.0, 0.0, 0.0, 0.0, 0.0, 0.0, 0.0, 0.0
0.0, 0.0, 0.0, 0.0, 0.0, 0.0, 0.0, 0.0
0.500000,  0.000000, 0.0, 0.0, 0.0, 0.0, 0.0, 0.0
0.000000,  10.000000,  0.000010, 0.0, 0.0, 0.0, 0.0, 0.0
*Material, name=metal-7
*Damage Initiation, criterion=USER, FAILURE MECHANISMS=1, PROPERTIES=1
 0.02,
*Damage Evolution, type=DISPLACEMENT, FAILURE INDEX=1
 0.02,
*Damage Stabilization
1e-06
*Depvar
128,
*User Material, constants=160, unsymm
230.714e3,  144.240e3,  119.228e3,  0.0, 0.0, 0.0, 0.0, 0.0
0.0, 0.0, 0.0, 0.0, 0.0, 0.0, 0.0, 0.0
0.0, 0.0, 0.0, 0.0, 0.0, 0.0, 0.0, 0.0
1.0, 0.0, 0.0, 0.0, 0.0, 0.0, 0.0, 0.0
1.0, 1.0, 1.0, 1.0, 1.0, 0.0, 0.0, 0.0
0.0, 0.0, 0.0, 0.0, 0.0, 0.0, 0.0, 0.0
0.0, 0.0, 0.0, 0.0, 0.0, 0.0, 0.0, 0.0
1.0, 0.0, 0.0,  0.305954,  -0.250196,  0.918583, 0.0, 0.0
0.0, 1.0, 0.0,  0.633211,  -0.667025,  -0.392583, 0.0, 0.0
20.000000,  0.001000, 0.0, 0.0, 0.0, 0.0, 0.0, 0.0
0.0, 0.0, 0.0, 0.0, 0.0, 0.0, 0.0, 0.0
0.0, 0.0, 0.0, 0.0, 0.0, 0.0, 0.0, 0.0
150.000000,  360.000000,  260.000000, 0.0, 0.0, 0.0, 0.0, 0.0
1.0, 1.0, 0.0, 0.0, 0.0, 0.0, 0.0, 0.0
0.0, 0.0, 0.0, 0.0, 0.0, 0.0, 0.0, 0.0
0.0, 0.0, 0.0, 0.0, 0.0, 0.0, 0.0, 0.0
0.0, 0.0, 0.0, 0.0, 0.0, 0.0, 0.0, 0.0
0.0, 0.0, 0.0, 0.0, 0.0, 0.0, 0.0, 0.0
0.500000,  0.000000, 0.0, 0.0, 0.0, 0.0, 0.0, 0.0
0.000000,  10.000000,  0.000010, 0.0, 0.0, 0.0, 0.0, 0.0
*Material, name=metal-18
*Damage Initiation, criterion=USER, FAILURE MECHANISMS=1, PROPERTIES=1
 0.02,
*Damage Evolution, type=DISPLACEMENT, FAILURE INDEX=1
 0.02,
*Damage Stabilization
1e-06
*Depvar
128,
*User Material, constants=160, unsymm
230.714e3,  144.240e3,  119.228e3,  0.0, 0.0, 0.0, 0.0, 0.0
0.0, 0.0, 0.0, 0.0, 0.0, 0.0, 0.0, 0.0
0.0, 0.0, 0.0, 0.0, 0.0, 0.0, 0.0, 0.0
1.0, 0.0, 0.0, 0.0, 0.0, 0.0, 0.0, 0.0
1.0, 1.0, 1.0, 1.0, 1.0, 0.0, 0.0, 0.0
0.0, 0.0, 0.0, 0.0, 0.0, 0.0, 0.0, 0.0
0.0, 0.0, 0.0, 0.0, 0.0, 0.0, 0.0, 0.0
1.0, 0.0, 0.0,  0.074109,  0.557778,  0.826675, 0.0, 0.0
0.0, 1.0, 0.0,  -0.374289,  0.783911,  -0.495370, 0.0, 0.0
20.000000,  0.001000, 0.0, 0.0, 0.0, 0.0, 0.0, 0.0
0.0, 0.0, 0.0, 0.0, 0.0, 0.0, 0.0, 0.0
0.0, 0.0, 0.0, 0.0, 0.0, 0.0, 0.0, 0.0
150.000000,  360.000000,  260.000000, 0.0, 0.0, 0.0, 0.0, 0.0
1.0, 1.0, 0.0, 0.0, 0.0, 0.0, 0.0, 0.0
0.0, 0.0, 0.0, 0.0, 0.0, 0.0, 0.0, 0.0
0.0, 0.0, 0.0, 0.0, 0.0, 0.0, 0.0, 0.0
0.0, 0.0, 0.0, 0.0, 0.0, 0.0, 0.0, 0.0
0.0, 0.0, 0.0, 0.0, 0.0, 0.0, 0.0, 0.0
0.500000,  0.000000, 0.0, 0.0, 0.0, 0.0, 0.0, 0.0
0.000000,  10.000000,  0.000010, 0.0, 0.0, 0.0, 0.0, 0.0
*Material, name=metal-15
*Damage Initiation, criterion=USER, FAILURE MECHANISMS=1, PROPERTIES=1
 0.02,
*Damage Evolution, type=DISPLACEMENT, FAILURE INDEX=1
 0.02,
*Damage Stabilization
1e-06
*Depvar
128,
*User Material, constants=160, unsymm
230.714e3,  144.240e3,  119.228e3,  0.0, 0.0, 0.0, 0.0, 0.0
0.0, 0.0, 0.0, 0.0, 0.0, 0.0, 0.0, 0.0
0.0, 0.0, 0.0, 0.0, 0.0, 0.0, 0.0, 0.0
1.0, 0.0, 0.0, 0.0, 0.0, 0.0, 0.0, 0.0
1.0, 1.0, 1.0, 1.0, 1.0, 0.0, 0.0, 0.0
0.0, 0.0, 0.0, 0.0, 0.0, 0.0, 0.0, 0.0
0.0, 0.0, 0.0, 0.0, 0.0, 0.0, 0.0, 0.0
1.0, 0.0, 0.0,  0.231739,  0.878124,  0.418563, 0.0, 0.0
0.0, 1.0, 0.0,  -0.972766,  0.207073,  0.104146, 0.0, 0.0
20.000000,  0.001000, 0.0, 0.0, 0.0, 0.0, 0.0, 0.0
0.0, 0.0, 0.0, 0.0, 0.0, 0.0, 0.0, 0.0
0.0, 0.0, 0.0, 0.0, 0.0, 0.0, 0.0, 0.0
150.000000,  360.000000,  260.000000, 0.0, 0.0, 0.0, 0.0, 0.0
1.0, 1.0, 0.0, 0.0, 0.0, 0.0, 0.0, 0.0
0.0, 0.0, 0.0, 0.0, 0.0, 0.0, 0.0, 0.0
0.0, 0.0, 0.0, 0.0, 0.0, 0.0, 0.0, 0.0
0.0, 0.0, 0.0, 0.0, 0.0, 0.0, 0.0, 0.0
0.0, 0.0, 0.0, 0.0, 0.0, 0.0, 0.0, 0.0
0.500000,  0.000000, 0.0, 0.0, 0.0, 0.0, 0.0, 0.0
0.000000,  10.000000,  0.000010, 0.0, 0.0, 0.0, 0.0, 0.0
*Material, name=metal-13
*Damage Initiation, criterion=USER, FAILURE MECHANISMS=1, PROPERTIES=1
 0.02,
*Damage Evolution, type=DISPLACEMENT, FAILURE INDEX=1
 0.02,
*Damage Stabilization
1e-06
*Depvar
128,
*User Material, constants=160, unsymm
230.714e3,  144.240e3,  119.228e3,  0.0, 0.0, 0.0, 0.0, 0.0
0.0, 0.0, 0.0, 0.0, 0.0, 0.0, 0.0, 0.0
0.0, 0.0, 0.0, 0.0, 0.0, 0.0, 0.0, 0.0
1.0, 0.0, 0.0, 0.0, 0.0, 0.0, 0.0, 0.0
1.0, 1.0, 1.0, 1.0, 1.0, 0.0, 0.0, 0.0
0.0, 0.0, 0.0, 0.0, 0.0, 0.0, 0.0, 0.0
0.0, 0.0, 0.0, 0.0, 0.0, 0.0, 0.0, 0.0
1.0, 0.0, 0.0,  0.300085,  0.237802,  0.923796, 0.0, 0.0
0.0, 1.0, 0.0,  0.167904,  0.940141,  -0.296551, 0.0, 0.0
20.000000,  0.001000, 0.0, 0.0, 0.0, 0.0, 0.0, 0.0
0.0, 0.0, 0.0, 0.0, 0.0, 0.0, 0.0, 0.0
0.0, 0.0, 0.0, 0.0, 0.0, 0.0, 0.0, 0.0
150.000000,  360.000000,  260.000000, 0.0, 0.0, 0.0, 0.0, 0.0
1.0, 1.0, 0.0, 0.0, 0.0, 0.0, 0.0, 0.0
0.0, 0.0, 0.0, 0.0, 0.0, 0.0, 0.0, 0.0
0.0, 0.0, 0.0, 0.0, 0.0, 0.0, 0.0, 0.0
0.0, 0.0, 0.0, 0.0, 0.0, 0.0, 0.0, 0.0
0.0, 0.0, 0.0, 0.0, 0.0, 0.0, 0.0, 0.0
0.500000,  0.000000, 0.0, 0.0, 0.0, 0.0, 0.0, 0.0
0.000000,  10.000000,  0.000010, 0.0, 0.0, 0.0, 0.0, 0.0
*Material, name=metal-1
*Damage Initiation, criterion=USER, FAILURE MECHANISMS=1, PROPERTIES=1
 0.02,
*Damage Evolution, type=DISPLACEMENT, FAILURE INDEX=1
 0.02,
*Damage Stabilization
1e-06
*Depvar
128,
*User Material, constants=160, unsymm
230.714e3,  144.240e3,  119.228e3,  0.0, 0.0, 0.0, 0.0, 0.0
0.0, 0.0, 0.0, 0.0, 0.0, 0.0, 0.0, 0.0
0.0, 0.0, 0.0, 0.0, 0.0, 0.0, 0.0, 0.0
1.0, 0.0, 0.0, 0.0, 0.0, 0.0, 0.0, 0.0
1.0, 1.0, 1.0, 1.0, 1.0, 0.0, 0.0, 0.0
0.0, 0.0, 0.0, 0.0, 0.0, 0.0, 0.0, 0.0
0.0, 0.0, 0.0, 0.0, 0.0, 0.0, 0.0, 0.0
1.0, 0.0, 0.0,  -0.299515,  -0.713884,  -0.632978, 0.0, 0.0
0.0, 1.0, 0.0,  0.307441,  0.555832,  -0.772354, 0.0, 0.0
20.000000,  0.001000, 0.0, 0.0, 0.0, 0.0, 0.0, 0.0
0.0, 0.0, 0.0, 0.0, 0.0, 0.0, 0.0, 0.0
0.0, 0.0, 0.0, 0.0, 0.0, 0.0, 0.0, 0.0
150.000000,  360.000000,  260.000000, 0.0, 0.0, 0.0, 0.0, 0.0
1.0, 1.0, 0.0, 0.0, 0.0, 0.0, 0.0, 0.0
0.0, 0.0, 0.0, 0.0, 0.0, 0.0, 0.0, 0.0
0.0, 0.0, 0.0, 0.0, 0.0, 0.0, 0.0, 0.0
0.0, 0.0, 0.0, 0.0, 0.0, 0.0, 0.0, 0.0
0.0, 0.0, 0.0, 0.0, 0.0, 0.0, 0.0, 0.0
0.500000,  0.000000, 0.0, 0.0, 0.0, 0.0, 0.0, 0.0
0.000000,  10.000000,  0.000010, 0.0, 0.0, 0.0, 0.0, 0.0
*Material, name=metal-17
*Damage Initiation, criterion=USER, FAILURE MECHANISMS=1, PROPERTIES=1
 0.02,
*Damage Evolution, type=DISPLACEMENT, FAILURE INDEX=1
 0.02,
*Damage Stabilization
1e-06
*Depvar
128,
*User Material, constants=160, unsymm
230.714e3,  144.240e3,  119.228e3,  0.0, 0.0, 0.0, 0.0, 0.0
0.0, 0.0, 0.0, 0.0, 0.0, 0.0, 0.0, 0.0
0.0, 0.0, 0.0, 0.0, 0.0, 0.0, 0.0, 0.0
1.0, 0.0, 0.0, 0.0, 0.0, 0.0, 0.0, 0.0
1.0, 1.0, 1.0, 1.0, 1.0, 0.0, 0.0, 0.0
0.0, 0.0, 0.0, 0.0, 0.0, 0.0, 0.0, 0.0
0.0, 0.0, 0.0, 0.0, 0.0, 0.0, 0.0, 0.0
1.0, 0.0, 0.0,  -0.118406,  0.980899,  -0.154329, 0.0, 0.0
0.0, 1.0, 0.0,  0.868423,  0.177660,  0.462903, 0.0, 0.0
20.000000,  0.001000, 0.0, 0.0, 0.0, 0.0, 0.0, 0.0
0.0, 0.0, 0.0, 0.0, 0.0, 0.0, 0.0, 0.0
0.0, 0.0, 0.0, 0.0, 0.0, 0.0, 0.0, 0.0
150.000000,  360.000000,  260.000000, 0.0, 0.0, 0.0, 0.0, 0.0
1.0, 1.0, 0.0, 0.0, 0.0, 0.0, 0.0, 0.0
0.0, 0.0, 0.0, 0.0, 0.0, 0.0, 0.0, 0.0
0.0, 0.0, 0.0, 0.0, 0.0, 0.0, 0.0, 0.0
0.0, 0.0, 0.0, 0.0, 0.0, 0.0, 0.0, 0.0
0.0, 0.0, 0.0, 0.0, 0.0, 0.0, 0.0, 0.0
0.500000,  0.000000, 0.0, 0.0, 0.0, 0.0, 0.0, 0.0
0.000000,  10.000000,  0.000010, 0.0, 0.0, 0.0, 0.0, 0.0
*Material, name=metal-10
*Damage Initiation, criterion=USER, FAILURE MECHANISMS=1, PROPERTIES=1
 0.02,
*Damage Evolution, type=DISPLACEMENT, FAILURE INDEX=1
 0.02,
*Damage Stabilization
1e-06
*Depvar
128,
*User Material, constants=160, unsymm
230.714e3,  144.240e3,  119.228e3,  0.0, 0.0, 0.0, 0.0, 0.0
0.0, 0.0, 0.0, 0.0, 0.0, 0.0, 0.0, 0.0
0.0, 0.0, 0.0, 0.0, 0.0, 0.0, 0.0, 0.0
1.0, 0.0, 0.0, 0.0, 0.0, 0.0, 0.0, 0.0
1.0, 1.0, 1.0, 1.0, 1.0, 0.0, 0.0, 0.0
0.0, 0.0, 0.0, 0.0, 0.0, 0.0, 0.0, 0.0
0.0, 0.0, 0.0, 0.0, 0.0, 0.0, 0.0, 0.0
1.0, 0.0, 0.0,  0.079544,  0.993428,  -0.082302, 0.0, 0.0
0.0, 1.0, 0.0,  0.075105,  -0.088302,  -0.993258, 0.0, 0.0
20.000000,  0.001000, 0.0, 0.0, 0.0, 0.0, 0.0, 0.0
0.0, 0.0, 0.0, 0.0, 0.0, 0.0, 0.0, 0.0
0.0, 0.0, 0.0, 0.0, 0.0, 0.0, 0.0, 0.0
150.000000,  360.000000,  260.000000, 0.0, 0.0, 0.0, 0.0, 0.0
1.0, 1.0, 0.0, 0.0, 0.0, 0.0, 0.0, 0.0
0.0, 0.0, 0.0, 0.0, 0.0, 0.0, 0.0, 0.0
0.0, 0.0, 0.0, 0.0, 0.0, 0.0, 0.0, 0.0
0.0, 0.0, 0.0, 0.0, 0.0, 0.0, 0.0, 0.0
0.0, 0.0, 0.0, 0.0, 0.0, 0.0, 0.0, 0.0
0.500000,  0.000000, 0.0, 0.0, 0.0, 0.0, 0.0, 0.0
0.000000,  10.000000,  0.000010, 0.0, 0.0, 0.0, 0.0, 0.0
*Material, name=metal-20
*Damage Initiation, criterion=USER, FAILURE MECHANISMS=1, PROPERTIES=1
 0.02,
*Damage Evolution, type=DISPLACEMENT, FAILURE INDEX=1
 0.02,
*Damage Stabilization
1e-06
*Depvar
128,
*User Material, constants=160, unsymm
230.714e3,  144.240e3,  119.228e3,  0.0, 0.0, 0.0, 0.0, 0.0
0.0, 0.0, 0.0, 0.0, 0.0, 0.0, 0.0, 0.0
0.0, 0.0, 0.0, 0.0, 0.0, 0.0, 0.0, 0.0
1.0, 0.0, 0.0, 0.0, 0.0, 0.0, 0.0, 0.0
1.0, 1.0, 1.0, 1.0, 1.0, 0.0, 0.0, 0.0
0.0, 0.0, 0.0, 0.0, 0.0, 0.0, 0.0, 0.0
0.0, 0.0, 0.0, 0.0, 0.0, 0.0, 0.0, 0.0
1.0, 0.0, 0.0,  0.423787,  0.688470,  0.588569, 0.0, 0.0
0.0, 1.0, 0.0,  -0.588343,  -0.284820,  0.756789, 0.0, 0.0
20.000000,  0.001000, 0.0, 0.0, 0.0, 0.0, 0.0, 0.0
0.0, 0.0, 0.0, 0.0, 0.0, 0.0, 0.0, 0.0
0.0, 0.0, 0.0, 0.0, 0.0, 0.0, 0.0, 0.0
150.000000,  360.000000,  260.000000, 0.0, 0.0, 0.0, 0.0, 0.0
1.0, 1.0, 0.0, 0.0, 0.0, 0.0, 0.0, 0.0
0.0, 0.0, 0.0, 0.0, 0.0, 0.0, 0.0, 0.0
0.0, 0.0, 0.0, 0.0, 0.0, 0.0, 0.0, 0.0
0.0, 0.0, 0.0, 0.0, 0.0, 0.0, 0.0, 0.0
0.0, 0.0, 0.0, 0.0, 0.0, 0.0, 0.0, 0.0
0.500000,  0.000000, 0.0, 0.0, 0.0, 0.0, 0.0, 0.0
0.000000,  10.000000,  0.000010, 0.0, 0.0, 0.0, 0.0, 0.0
**
** INTERACTION PROPERTIES
**
*Surface Interaction, name=IntProp-1
1.,
*Surface Behavior, pressure-overclosure=LINEAR
1e+07,
** ----------------------------------------------------------------
**
** STEP: Load
**
*Step, name=Load, nlgeom=NO, inc=100000
*Static
0.01, 1., 1e-15, 0.01
**
** BOUNDARY CONDITIONS
**
** Name: BC-1 Type: Displacement/Rotation
*Boundary
Set-4, 2, 2
** Name: BC-2 Type: Displacement/Rotation
*Boundary
Set-5, 1, 1
** Name: BC-3 Type: Displacement/Rotation
*Boundary
Set-6, 2, 2, 5.
**
** CONTROLS
**
*Controls, reset
*Controls, analysis=discontinuous
*Controls, parameters=time incrementation
, , , , , , , 20, , ,
**
** OUTPUT REQUESTS
**
*Restart, write, frequency=0
**
** FIELD OUTPUT: F-Output-1
**
*Output, field
*Node Output
CF, PHILSM, PSILSM, RF, U
*Element Output, directions=YES
LE, PE, PEEQ, PEMAG, S, STATUSXFEM
SDV109, SDV110, SDV111, SDV112, SDV113, SDV114, SDV115, SDV116
SDV117, SDV118, SDV119, SDV120, SDV121
*Contact Output
CDISP, CSTRESS
**
** HISTORY OUTPUT: H-Output-1
**
*Output, history, variable=PRESELECT
*End Step
