*Heading
** Job name: u-1000 Model name: Model-1
** Generated by: Abaqus/CAE 2021
*Preprint, echo=NO, model=NO, history=NO, contact=NO
**
** PARTS
**
*Part, name=Face2D
*Node
      1,    165.82048,  -71.9112854
      2,   159.470627,  -53.8151093
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*Element, type=CPS4
   1,    18,    19,   720,   589
   2,    19,    20,   721,   720
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*Nset, nset=Set-2, generate
     1,  10029,      1
*Elset, elset=Set-2, generate
    1,  9800,     1
*End Part
**
**
** ASSEMBLY
**
*Assembly, name=Assembly
**
*Instance, name=Face2D-1, part=Face2D
*End Instance
**
*Nset, nset=Set-4, instance=Face2D-1
  11,  12,  14, 429, 430, 431
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*Elset, elset=Set-4, instance=Face2D-1
 7787, 7806, 7825, 7844, 7863, 7882
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*Nset, nset=Set-5, instance=Face2D-1
 11,
*Nset, nset=Set-6, instance=Face2D-1
   2,   3,   8,  43,  44,  45
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*Elset, elset=Set-6, instance=Face2D-1
   32,   48,   64,   80,   96,  112
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*Nset, nset=_PickedSet12, internal, instance=Face2D-1, generate
     1,  10029,      1
*Elset, elset=_PickedSet12, internal, instance=Face2D-1, generate
    1,  9800,     1
*Elset, elset=_TopSurf_S1, internal, instance=FACE2D-1, generate
 145,  231,    1
*Elset, elset=_TopSurf_S2, internal, instance=FACE2D-1, generate
  32,  144,   16
*Elset, elset=_TopSurf_S4, internal, instance=FACE2D-1, generate
 4207,  4369,    18
*Surface, type=ELEMENT, name=TopSurf
_TopSurf_S1, S1
_TopSurf_S2, S2
_TopSurf_S4, S4
*Enrichment, name=Crack-1, type=PROPAGATION CRACK, elset=_PickedSet12, interaction=IntProp-1
*End Assembly
**
** INTERACTION PROPERTIES
**
*Surface Interaction, name=IntProp-1
1.,
*Surface Behavior, pressure-overclosure=LINEAR
1e+07,
** ----------------------------------------------------------------
**
** STEP: Load
**
*Step, name=Load, nlgeom=NO, inc=100000
*Static
10.0, 1000., 1e-15, 10.0
**
** BOUNDARY CONDITIONS
**
** Name: BC-1 Type: Displacement/Rotation
*Boundary
Set-4, 2, 2
** Name: BC-2 Type: Displacement/Rotation
*Boundary
Set-5, 1, 1
**
** LOADS
**
** Name: Load-1   Type: Pressure
*Dsload
TopSurf, P, -2000.
**
** CONTROLS
**
*Controls, reset
*Controls, analysis=discontinuous
*Controls, parameters=time incrementation
, , , , , , , 20, , ,
**
** OUTPUT REQUESTS
**
*Restart, write, frequency=0
**
** FIELD OUTPUT: F-Output-1
**
*Output, field, FREQUENCY=20
*Node Output
CF, PHILSM, PSILSM, RF, U
*Element Output, directions=YES
LE, PE, PEEQ, PEMAG, S, STATUSXFEM
SDV121
*Contact Output
CDISP, CSTRESS
**
** HISTORY OUTPUT: H-Output-1
**
*Output, history, variable=PRESELECT
*End Step
